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/batch
! ANSYS input file written by Workbench version 16.0 RELEASE
! File used for geometry attach: J:\Thesis Work\lifesaver_files\dp0\Geom\DM\Geom.agdb
/title,lifesaver--Static Structural (C5)
/com,--- Data in consistent MKS units. See Solving Units in the help system for more information.
/units,MKS
/prep7
! Turn off shape checking because checks already performed inside WB mesher.
! See help system for more information.
SHPP,OFF,,NOWARN
etcon,set             ! allow ANSYS to choose best KEYOP's for 180x elements
/com,*********** Nodes for the whole assembly ***********
nblock,3
(1i9,3e20.9e3)
        1    7.000000000E-002    5.000000000E-002    0.000000000E+000
        2    3.000000000E-002    5.000000000E-002    0.000000000E+000
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-1
/com,*********** Elements for Body 1 "Surface Body" ***********
et,1,181
keyo,1,3,2
eblock,19,solid,,7344
(19i9)
        1        1        1        1        0        0        0        0        4        0        1     7271        9     7414        5
        1        1        1        1        0        0        0        0        4        0        2     7272       38        9     7271
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-1
/com,*********** Send User Defined Coordinate System(s) ***********
csys,0
toffst,273.15,  ! Temperature offset from absolute zero
/com,*********** Set Reference Temperature ***********
tref,22.
/com,*********** Send Materials ***********
MP,DENS,1,7750,	! kg m^-3
MP,ALPX,1,1.7e-05,	! C^-1
MP,C,1,480,	! J kg^-1 C^-1
MP,KXX,1,15.1,	! W m^-1 C^-1
MP,RSVX,1,7.7e-07,	! kg m^3 A^-2 s^-3
MP,EX,1,193000000000,	! Pa
MP,NUXY,1,0.31,
MP,MURX,1,1,

/com,*********** Send Sheet Properties ***********
sectype,1,shell
secdata,2.e-002
secoff,mid
!************************* Model Summary ********************
!Surface Body,	Stainless Steel,	matid,	1
!************************* End Model Summary ********************
/com,*********** Fixed Supports ***********
CMBLOCK,_FIXEDSU,NODE,       25
(8i10)
         2         3      7544      7545      7546      7547      7548      7549
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cmsel,s,_FIXEDSU
d,all,all
nsel,all
nsel,all
/com,*********** Define Force Using Surface Effect Elements ***********
local,12,0,0.,0.,0.,-0.,0.,0.
csys,0
et,2,156
keyop,2,5,1   ! No orientation node
eblock,10,,,120
(15i9)
     7345        2        2        2       12     7241        8
     7346        2        2        2       12     7240     7241
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-1
esel,s,type,,2
keyop,2,2,1                ! Apply load in local coordinate system
keyop,2,7,1                ! Use original area so load is constant in large deformation
esel,all

*DIM,_loadvari99x,TABLE,2,1,1,TIME,
! Time values
_loadvari99x(1,0,1) = 0.
_loadvari99x(2,0,1) = 1.
! Load values
_loadvari99x(1,1,1) = 0.
_loadvari99x(2,1,1) = 0.


*DIM,_loadvari99y,TABLE,2,1,1,TIME,
! Time values
_loadvari99y(1,0,1) = 0.
_loadvari99y(2,0,1) = 1.
! Load values
_loadvari99y(1,1,1) = 0.
_loadvari99y(2,1,1) = -3333.33333333333


*DIM,_loadvari99z,TABLE,2,1,1,TIME,
! Time values
_loadvari99z(1,0,1) = 0.
_loadvari99z(2,0,1) = 1.
! Load values
_loadvari99z(1,1,1) = 0.
_loadvari99z(2,1,1) = 0.

/com,*********** Define Body Force Temperature ***********
esel,none
esel,a,mat,,1
cm,_CM97,elem
esel,all

*DIM,_loadvari97,TABLE,2,1,1,TIME,
! Time values
_loadvari97(1,0,1) = 0.
_loadvari97(2,0,1) = 1.
! Load values
_loadvari97(1,1,1) = 22.
_loadvari97(2,1,1) = 22.

/com,*********** Define Rotational Velocity ***********
cglo,0.,0.,0.

*DIM,_loadvari25x,TABLE,2,1,1,TIME,
! Time values
_loadvari25x(1,0,1) = 0.
_loadvari25x(2,0,1) = 1.
! Load values
_loadvari25x(1,1,1) = 0.
_loadvari25x(2,1,1) = 0.


*DIM,_loadvari25y,TABLE,2,1,1,TIME,
! Time values
_loadvari25y(1,0,1) = 0.
_loadvari25y(2,0,1) = 1.
! Load values
_loadvari25y(1,1,1) = 0.
_loadvari25y(2,1,1) = 10.


*DIM,_loadvari25z,TABLE,2,1,1,TIME,
! Time values
_loadvari25z(1,0,1) = 0.
_loadvari25z(2,0,1) = 1.
! Load values
_loadvari25z(1,1,1) = 0.
_loadvari25z(2,1,1) = 0.

fini
/com,****************************************************************************
/com,*************************    SOLUTION       ********************************
/com,****************************************************************************
/solu
antype,0                   ! static analysis
eqsl,sparse,,,,,1
cntr,print,1               ! print out contact info and also make no initial contact an error
nldiag,cont,iter           ! print out contact info each equilibrium iteration
resc,,none                 ! Do not keep any restart files
/com,****************************************************
/com,******************* SOLVE FOR LS 1 ****************
esel,s,type,,2
nsle
sfe,all,1,pres,1,%_loadvari99x%
sfe,all,2,pres,1,%_loadvari99y%
sfe,all,3,pres,1,%_loadvari99z%
nsel,all
esel,all
cgom,%_loadvari25x%,%_loadvari25y%,%_loadvari25z%
cmsel,s,_CM97
nsle
bf,all,temp,%_loadvari97%
nsel,all
esel,all
nsub,1,1,1
time,1.
outres,erase
outres,all,none
outres,nsol,all
outres,rsol,all
outres,strs,all
outres,epel,all
outres,eppl,all
outres,epth,all
stabilize,off                   ! Stabilization turned OFF by user
! *********** WB SOLVE COMMAND ***********
! check interactive state
*get,ANSINTER_,active,,int
*if,ANSINTER_,ne,0,then
/eof
*endif
solve
/com *************** Write FE CONNECTORS *********
CEWRITE,file,ce,,INTE
/com,****************************************************
/com,*************** FINISHED SOLVE FOR LS 1 *************
*set,_DS_PROGRESS          ! turn off progress updates to avoid virus scanning bug
/post1
fini
