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/batch
! ANSYS input file written by Workbench version 16.0 RELEASE
! File used for geometry attach: J:\Thesis Work\simple_disk_files\dp0\SYS\DM\SYS.agdb
/title,simple_disk--Static Structural (A5)
/com,--- Data in consistent MKS units. See Solving Units in the help system for more information.
/units,MKS
/prep7
! Turn off shape checking because checks already performed inside WB mesher.
! See help system for more information.
SHPP,OFF,,NOWARN
etcon,set             ! allow ANSYS to choose best KEYOP's for 180x elements
/com,*********** Nodes for the whole assembly ***********
nblock,3
(1i9,3e20.9e3)
        1    2.000000000E-002    1.000000000E-002    0.000000000E+000
        2    2.000000000E-002    0.000000000E+000    0.000000000E+000
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-1
/com,*********** Elements for Body 1 "Surface Body" ***********
et,1,181
keyo,1,3,2
eblock,19,solid,,3960
(19i9)
        1        1        1        1        0        0        0        0        4        0        1     3945        5     4160        3
        1        1        1        1        0        0        0        0        4        0        2     3946      202        5     3945
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-1
/com,*********** Send User Defined Coordinate System(s) ***********
csys,0
toffst,273.15,  ! Temperature offset from absolute zero
/com,*********** Set Reference Temperature ***********
tref,22.
/com,*********** Send Materials ***********
MP,DENS,1,7850,	! kg m^-3
MP,ALPX,1,1.2e-05,	! C^-1
MP,C,1,434,	! J kg^-1 C^-1
MP,KXX,1,60.5,	! W m^-1 C^-1
MP,RSVX,1,1.7e-07,	! kg m^3 A^-2 s^-3
MP,EX,1,200000000000,	! Pa
MP,NUXY,1,0.3,
MP,MURX,1,10000,

/com,*********** Send Sheet Properties ***********
sectype,1,shell
secdata,5.e-003
secoff,mid
!************************* Model Summary ********************
!Surface Body,	Structural Steel,	matid,	1
!************************* End Model Summary ********************
/com,*********** Fixed Supports ***********
CMBLOCK,_FIXEDSU,NODE,       21
(8i10)
         1         2      4161      4162      4163      4164      4165      4166
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cmsel,s,_FIXEDSU
d,all,all
nsel,all
nsel,all
/com,*********** Define Rotational Velocity ***********
cglo,0.,0.,0.

*DIM,_loadvari34x,TABLE,2,1,1,TIME,
! Time values
_loadvari34x(1,0,1) = 0.
_loadvari34x(2,0,1) = 1.
! Load values
_loadvari34x(1,1,1) = 0.
_loadvari34x(2,1,1) = 0.


*DIM,_loadvari34y,TABLE,2,1,1,TIME,
! Time values
_loadvari34y(1,0,1) = 0.
_loadvari34y(2,0,1) = 1.
! Load values
_loadvari34y(1,1,1) = 0.
_loadvari34y(2,1,1) = 50.


*DIM,_loadvari34z,TABLE,2,1,1,TIME,
! Time values
_loadvari34z(1,0,1) = 0.
_loadvari34z(2,0,1) = 1.
! Load values
_loadvari34z(1,1,1) = 0.
_loadvari34z(2,1,1) = 0.

fini
/com,****************************************************************************
/com,*************************    SOLUTION       ********************************
/com,****************************************************************************
/solu
antype,0                   ! static analysis
eqsl,sparse,,,,,1
cntr,print,1               ! print out contact info and also make no initial contact an error
nldiag,cont,iter           ! print out contact info each equilibrium iteration
resc,,none                 ! Do not keep any restart files
/com,****************************************************
/com,******************* SOLVE FOR LS 1 ****************
cgom,%_loadvari34x%,%_loadvari34y%,%_loadvari34z%
nsub,1,1,1
time,1.
outres,erase
outres,all,none
outres,nsol,all
outres,rsol,all
outres,strs,all
outres,epel,all
outres,eppl,all
stabilize,off                   ! Stabilization turned OFF by user
! *********** WB SOLVE COMMAND ***********
! check interactive state
*get,ANSINTER_,active,,int
*if,ANSINTER_,ne,0,then
/eof
*endif
solve
/com *************** Write FE CONNECTORS *********
CEWRITE,file,ce,,INTE
/com,****************************************************
/com,*************** FINISHED SOLVE FOR LS 1 *************
*set,_DS_PROGRESS          ! turn off progress updates to avoid virus scanning bug
/post1
fini
